<Lems>

    <!-- Specify which component to run -->
    <Target component="sim1" />

    <!-- Include core NeuroML2 ComponentType definitions -->
    <Include file="Cells.xml" />
    <Include file="Networks.xml" />
    <Include file="Simulation.xml" />

    <Include file="g2do.lems.xml" />

    <pulseGeneratorDL id="pg0" delay="1500ms" duration="20ms" amplitude="1" />

    <g2do id="g2do1" tau="1.0" I=".0" a="-2" b="-10.0" c="0.0" d="0.02" e="3.0" f="1.0" g="0.0" alpha="1.0" beta="1.0" gamma="1.0"/>

    <g2do id="g2do2" tau="100" I="1.0" a="1" b="1" c="0.0" d="1" e="0" f="0" g="0.0" alpha="-2" beta="1.0" gamma="0"/>

    <network id="net1">
        <population id="Pop1" component="g2do1" size="1" />
       <!-- <population id="Pop2" component="g2do2" size="1" />-->
        <explicitInput target="Pop1[0]" input="pg0" destination="synapses"/>
    </network>

    <!-- End of NeuroML2 content -->

    <Simulation id="sim1" length="1000000ms" step="10ms" target="net1">

        <Display id="d1" title="Ex   LEMS" timeScale="1s" xmin="-50" xmax="1050" ymin="-2.5" ymax="2.5">
            <Line id="V" quantity="Pop1[0]/V" scale="1" color="#e77000" timeScale="1ms" />
            <Line id="W" quantity="Pop1[0]/W" scale="1" color="#ee00FF" timeScale="1ms" />
            <!--
            <Line id="V2" quantity="Pop2[0]/V" scale="1" color="#ee0000" timeScale="1ms" />
            <Line id="W2" quantity="Pop2[0]/W" scale="1" color="#000099" timeScale="1ms" />-->
        </Display>

        <OutputFile id="of1" fileName="results_g2do.dat">
            <OutputColumn id="o0" quantity="Pop1[0]/V"/>
        </OutputFile>

    </Simulation>

</Lems>
