<neuroml xmlns="http://www.neuroml.org/schema/neuroml2"  xmlns:xs="http://www.w3.org/2001/XMLSchema" xmlns:xsi="http://www.w3.org/2001/XMLSchema-instance" xsi:schemaLocation="http://www.neuroml.org/schema/neuroml2 https://raw.github.com/NeuroML/NeuroML2/development/Schemas/NeuroML2/NeuroML_v2beta5.xsd" id="ExampleK">
    <notes>Generated network: ExampleK
    Generation seed: 1234
    NeuroMLlite parameters:
        stim_amp = 0.3
        pop_size = 8</notes>
    <pulseGeneratorDL id="iclamp0" delay="100ms" duration="800ms" amplitude="0.3"/>
    <network id="ExampleK">
        <notes>Example...</notes>
        <population id="Epop" component="kuramoto1" size="8" type="populationList">
            <property tag="region" value="region1"/>
            <instance id="0">
                <location x="966.453535692138757" y="44.073259917535268" z="7.491470058587191"/>
            </instance>
            <instance id="1">
                <location x="910.975962449124154" y="93.926899736376399" z="582.227573058949133"/>
            </instance>
            <instance id="2">
                <location x="671.563481487985086" y="8.393822683708397" z="766.480932791796249"/>
            </instance>
            <instance id="3">
                <location x="236.809775363117751" y="3.081402172660996" z="788.772717236283484"/>
            </instance>
            <instance id="4">
                <location x="346.088965597123092" y="62.328147503916853" z="615.815695103615212"/>
            </instance>
            <instance id="5">
                <location x="148.55463870828757" y="18.309064740993165" z="114.412969688687639"/>
            </instance>
            <instance id="6">
                <location x="14.618780486909122" y="48.675154060475833" z="964.901560916215658"/>
            </instance>
            <instance id="7">
                <location x="64.562280977186077" y="54.108818555113025" z="465.898559008309576"/>
            </instance>
        </population>
        <inputList id="stim" population="Epop" component="iclamp0">
            <input id="0" target="../Epop/1/kuramoto1" destination="synapses"/>
            <input id="1" target="../Epop/3/kuramoto1" destination="synapses"/>
            <input id="2" target="../Epop/6/kuramoto1" destination="synapses"/>
            <input id="3" target="../Epop/7/kuramoto1" destination="synapses"/>
        </inputList>
    </network>
</neuroml>
